// COMSOL Multiphysics 5.6.0.341 model "accelerometer.mph"
// Outline of the model tree

Parameters
  acceleration = 0.5[um]
  mass = 0.43841 [ug]
  g = 9.8 [m/s^2]

Geometry
  geom1 "Acelerometer" (2D, length unit µm)
    r1: Rectangle | size = {3, 540}
    r2: Rectangle | pos = {209, 0}; size = {3, 540}
    r3: Rectangle "profmass" | pos = {9, 230}; size = {200, 80}
    sq1: Square | pos = {3, 537}; size = 3
    r4: Rectangle | pos = {6, 0}; size = {3, 540}
    sq2: Square | pos = {3, 0}; size = 3
    sq3: Square | pos = {212, 537}; size = 3
    sq4: Square | pos = {212, 0}; size = 3
    r5: Rectangle | pos = {215, 0}; size = {3, 540}
    r6: Rectangle "finger" | pos = {18, 70}; size = {3, 160}
    r7: Rectangle "finger 1" | pos = {30, 70}; size = {3, 160}
    r8: Rectangle "finger 1.1" | pos = {42, 70}; size = {3, 160}
    r9: Rectangle "finger 2" | pos = {24, 64}; size = {3, 160}
    r10: Rectangle "finger 2.1" | pos = {36, 64}; size = {3, 160}
    r11: Rectangle "finger 2.1.1" | pos = {48, 64}; size = {3, 160}
    r12: Rectangle "finger 2.1.1.1" | pos = {12, 64}; size = {3, 160}
    r13: Rectangle "AnchorL" | pos = {-6, 230}; size = {6, 80}
    r14: Rectangle "AnchorR" | pos = {218, 230}; size = {6, 80}
    fin: Finalize "Form Union"

Materials
  mat1: Common "Polysilicon" on all domains
    def "Basic"
      electricconductivity = sigma(T)
      thermalexpansioncoefficient = alpha(T)
      heatcapacity = 678[J/(kg*K)]
      relpermittivity = 4.5
      density = 2320[kg/m^3]
      thermalconductivity = k(T)
      sigma: Analytic | expr = 1/(2e-5*(1+1.25e-3*(T-298.15))); args = T; dermethod = manual; argders = {T, d(1/(2e-5*(1+1.25e-3*(T-298.15))), T)}; argunit = K; fununit = S/m
      alpha: Analytic | expr = (3.725*(1-exp(-5.88e-3*(T-125)))+5.548e-4*T)*1e-6; args = T; dermethod = manual; argders = {T, d((3.725*(1-exp(-5.88e-3*(T-125)))+5.548e-4*T)*1e-6, T)}; argunit = K; fununit = 1/K
      k: Analytic | expr = 1/(-2.2e-11*T^3 + 9e-8*T^2 - 1e-5*T + 0.014); args = T; dermethod = manual; argders = {T, d(1/(-2.2e-11*T^3 + 9e-8*T^2 - 1e-5*T + 0.014), T)}; argunit = K; fununit = W/(m*K)
    Enu "Young's modulus and Poisson's ratio"
      youngsmodulus = 169e9[Pa]
      poissonsratio = 0.22
    linzRes "Linearized resistivity"
      rho0 = 2e-5
      alpha = 1.25e-3
      Tref = 298.15[K]

Physics
  solid: SolidMechanics on all domains
    dependent variable u = {u, v, w}
    lemm1: LinearElasticModel "Linear Elastic Material 1" (default)
    free1: Free (default)
    init1: init "Initial Values 1" (default)
    fix1: Fixed "Fixed Constraint 1" on boundaries 1-3, 6, 26-29, 35-38, 44-47, 53-56, 75, 76, 78, 79
    adm2: AddedMass2 (disabled) on domains 6 | MassType = mTot; mTot = mass
    fix2: Fixed "Fixed Constraint 2" on domains 1, 7, 9, 11, 13, 18
    bl1: BodyLoad on domains 6
      LoadType = TotalForce
      Ftot = {acceleration*g*mass, 0, 0}
      FperVol = {acceleration*9.8*mass, 0, 0}
  es: Electrostatics on all domains
    dependent variable V
    ccn1: ChargeConservation (default)
    zc1: ZeroCharge (default)
    init1: init "Initial Values 1" (default)
    cap1: DistributedCapacitance on boundaries 26, 29, 30, 33, 35, 38, 39, 42, 44, 47, 48, 51, 53, 56

Mesh
  mesh1 "Mesh 1" (physics-controlled)

Studies
  std1 "Study 1"
    stat: Stationary

Solver configurations
  sol1 "Solution 1" (study std1)
    v1: Variables "Dependent Variables 1"
    s1: Stationary "Stationary Solver 1"
      dDef: Direct
      fc1: FullyCoupled | linsolver = dDef

Datasets
  dset1: Solution | solution = sol1

Derived values
  gev1: EvalGlobal "Global Evaluation 1" | data = dset1

Plots
  pg1: PlotGroup2D "displacement (solid)" | data = dset1
    surf1: Surface | expr = u; descr = Displacement field, X component
      def: Deform "Deformation" | expr = {u, v}; descr = Displacement field
  pg2: PlotGroup2D "Volume Loads (solid)" | data = dset1
    arws1: ArrowSurface "Added Mass 2" | expr = {solid.adm2.F_VX, solid.adm2.F_VY}
      col: Color "Color Expression" | expr = solid.adm2.F_V_Mag
      def: Deform "Deformation" | expr = {u, v}; descr = Displacement field
    arws2: ArrowSurface "Body Load 1" | expr = {solid.bl1.F_Vx, solid.bl1.F_Vy}
      col: Color "Color Expression" | expr = solid.bl1.F_V_Mag
      def: Deform "Deformation" | expr = {u, v}; descr = Displacement field
    surf1: Surface "Gray Surfaces" | expr = 1
      def: Deform "Deformation" | expr = {u, v}; descr = Displacement field
      sel1: Selection on domains 1-18

Exports
  anim1: Animation | target = player